*Heading
** Job name: Thermal Model name: Heat
** Generated by: Abaqus/CAE Student Edition 2021
*Preprint, echo=NO, model=NO, history=NO, contact=NO
**
** PARTS
**
*Part, name=DAM
*Node
      1, -0.00100180507,   15.8691225
      2,           0.,           0.
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*Element, type=DC2D3
  1,  80,  71,  31
  2,  30,   4,   5
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*Nset, nset=B20
   9,  10,  11,  42,  43,  44
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*Elset, elset=B20, generate
 104,  160,    1
*Nset, nset=B30, generate
  1,  83,   1
*Elset, elset=B30, generate
   1,  103,    1
** Section: Section-1-B30
*Solid Section, elset=B30, material=B30
,
** Section: Section-2-B20
*Solid Section, elset=B20, material=B20
,
*End Part
**
**
** ASSEMBLY
**
*Assembly, name=Assembly
**
*Instance, name=DAM-1, part=DAM
*End Instance
**
*Nset, nset=AIR, instance=DAM-1
  3,  4,  5,  6,  7,  8, 31, 32, 33, 34, 35, 36, 37, 38, 39, 40
*Elset, elset=AIR, instance=DAM-1
   2,   8,  30,  31,  37,  38,  39,  41,  79,  81,  82,  86,  90,  91, 102
*Nset, nset=WATER, instance=DAM-1
  1,  2,  8, 12, 13, 14, 15, 16, 17, 18, 41
*Elset, elset=WATER, instance=DAM-1
 10, 12, 15, 20, 21, 58, 62, 64, 66, 93
*End Assembly
**
** MATERIALS
**
*Material, name=B20
*Conductivity
 1.5,
*Material, name=B30
*Conductivity
 1.75,
** ----------------------------------------------------------------
**
** STEP: Heat
**
*Step, name=Heat, nlgeom=NO
*Heat Transfer, steady state, deltmx=0.
1., 1., 1e-05, 1.,
**
** BOUNDARY CONDITIONS
**
** Name: Temp-BC-1 Type: Temperature
*Boundary
AIR, 11, 11, 25.
** Name: Temp-BC-2 Type: Temperature
*Boundary
WATER, 11, 11, 5.
**
** OUTPUT REQUESTS
**
*Restart, write, frequency=0
**
** FIELD OUTPUT: F-Output-1
**
*Output, field
*Node Output
COORD, NT
*Element Output, directions=YES
EVOL, TEMP
*Output, history, frequency=0
*End Step
